*Heading
** Job name: sucess1212 Model name: Model-2
** Generated by: Abaqus/CAE 2019
*Preprint, echo=NO, model=NO, history=NO, contact=NO
**
** PARTS
**
*Part, name=Stent_23-51
*Node
      1,  -1.02759242,   1.11362171,  0.286961228
      2, 0.00839767884,   1.14949811, 0.0339726806
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*Element, type=C3D10
  1,  445,  350,  349,  319,  500,  499,  498,  502,  501,  503
  2,  445,  350,  137,  349,  500,  505,  504,  498,  499,  506
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*Nset, nset=Set-1, generate
    1,  2428,     1
*Elset, elset=Set-1, generate
   1,  990,    1
*Nset, nset=Set-7, generate
    1,  2428,     1
*Elset, elset=Set-7, generate
   1,  990,    1
*Nset, nset=Set-8, generate
    1,  2428,     1
*Elset, elset=Set-8, generate
   1,  990,    1
** Section: Section-1
*Solid Section, elset=Set-8, material=Material-1
,
*End Part
**
**
** ASSEMBLY
**
*Assembly, name=Assembly
**
*Instance, name=Stent_23-51-1, part=Stent_23-51
*End Instance
**
*Nset, nset=Set-1, instance=Stent_23-51-1
   18,   19,   20,   21,   61,   62
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*Elset, elset=Set-1, instance=Stent_23-51-1
 299, 695, 711, 767, 773, 882, 895
*Nset, nset=Set-2, instance=Stent_23-51-1
 209, 211
*Nset, nset=Set-3, instance=Stent_23-51-1
 216, 217
*Elset, elset=_Surf-1_S3, internal, instance=Stent_23-51-1
   3,   5,   7,  13,  17,  19
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*Elset, elset=_Surf-1_S1, internal, instance=Stent_23-51-1
  57, 129, 150, 172, 188, 212
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*Elset, elset=_Surf-1_S2, internal, instance=Stent_23-51-1
  72, 107, 109, 115, 157, 239
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*Elset, elset=_Surf-1_S4, internal, instance=Stent_23-51-1
 103, 111, 248, 256, 283, 306
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*Surface, type=ELEMENT, name=Surf-1
_Surf-1_S3, S3
_Surf-1_S1, S1
_Surf-1_S2, S2
_Surf-1_S4, S4
*Elset, elset=_Surf-2_S3, internal, instance=Stent_23-51-1
   3,   5,   7,  13,  17,  19
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*Elset, elset=_Surf-2_S1, internal, instance=Stent_23-51-1
  57, 129, 150, 172, 188, 212
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*Elset, elset=_Surf-2_S2, internal, instance=Stent_23-51-1
  72, 107, 109, 115, 157, 239
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*Elset, elset=_Surf-2_S4, internal, instance=Stent_23-51-1
 103, 111, 248, 256, 283, 306
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*Surface, type=ELEMENT, name=Surf-2
_Surf-2_S3, S3
_Surf-2_S1, S1
_Surf-2_S2, S2
_Surf-2_S4, S4
*Elset, elset=_Surf-3_S3, internal, instance=Stent_23-51-1
   3,   5,   7,  13,  17,  19
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*Elset, elset=_Surf-3_S1, internal, instance=Stent_23-51-1
  57, 129, 150, 172, 188, 212
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*Elset, elset=_Surf-3_S2, internal, instance=Stent_23-51-1
  72, 107, 109, 115, 157, 239
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*Elset, elset=_Surf-3_S4, internal, instance=Stent_23-51-1
 103, 111, 248, 256, 283, 306
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*Surface, type=ELEMENT, name=Surf-3
_Surf-3_S3, S3
_Surf-3_S1, S1
_Surf-3_S2, S2
_Surf-3_S4, S4
*End Assembly
**
** MATERIALS
**
*Material, name=Material-1
*Density
20.,
*Elastic
 2e+11, 0.3
**
** BOUNDARY CONDITIONS
**
** Name: BC-1 Type: Symmetry/Antisymmetry/Encastre
*Boundary
Set-1, XSYMM
** Name: BC-2 Type: Symmetry/Antisymmetry/Encastre
*Boundary
Set-2, YASYMM
** Name: BC-3 Type: Symmetry/Antisymmetry/Encastre
*Boundary
Set-3, YSYMM
** ----------------------------------------------------------------
**
** STEP: Step-1
**
*Step, name=Step-1, nlgeom=NO
*Static
1., 1., 1e-05, 1.
**
** LOADS
**
** Name: Load-1   Type: Pressure
*Dsload
Surf-3, P, 10.
**
** OUTPUT REQUESTS
**
*Restart, write, frequency=0
**
** FIELD OUTPUT: F-Output-1
**
*Output, field, variable=PRESELECT
**
** HISTORY OUTPUT: H-Output-1
**
*Output, history, variable=PRESELECT
*End Step
